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# 2. Описание установки
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# 3. Обработка результатов измерений.
ORIGIN := 1
t1 := [
    21.1, 20.9, 20.1, 20.7, 21.6, 22, 29.2, 38.1, 60;
    24.4, 21, 21.3, 21, 22, 22.1, 29.8, 39.3, 120;
    27.5, 21.1, 21.7, 21.7, 22.4, 22.5, 30.6, 41, 180;
    29.6, 21.5, 21.8, 21.2, 22.7, 22.7, 31.2, 42.1, 240;
    31.4, 22.1, 22.2, 21.2, 23.1, 23.2, 31.9, 42.6, 300;
    33, 23.1, 23.4, 21.4, 23.5, 23.7, 32.6, 42.6, 360;
    34.2, 24.3, 23.8, 21.5, 23.9, 24, 33.1, 42.6, 420;
    35.1, 25.5, 23, 21.7, 24.3, 24.5, 33.5, 42.3, 480;
    35.8, 26.9, 23.1, 21.8, 24.7, 24.8, 34.2, 42.5, 540;
    36.6, 28.3, 23.8, 22.2, 25.2, 25.3, 34.6, 42.5, 600;
    37.1, 29.4, 24.1, 22.6, 25.5, 25.6, 34.8, 42.5, 660;
    37.9, 31.8, 24.6, 22.8, 26, 26.1, 35.5, 42.5, 720;
    38.1, 31.9, 24.7, 23.5, 26.3, 26.4, 35.6, 42.3, 780;
    38.8, 33, 25, 23.4, 26.6, 26.8, 35.8, 42.3, 840;
    39.1, 33.9, 25.3, 23.9, 27, 27.1, 36.3, 42.5, 900;
    39.4, 34.7, 25.8, 24.2, 27.2, 27.5, 36.4, 42.5, 960;
    39.7, 35.6, 26.1, 24.7, 27.6, 27.7, 36.8, 42.5, 1020;
    40, 36.3, 26.3, 24.9, 27.9, 28.1, 36.9, 42.3, 1080;
    40.2, 36.7, 26.4, 25.1, 28.2, 28.3, 37.2, 42.5, 1140;
    40.5, 37.4, 27, 25.5, 28.6, 28.7, 37.3, 42.3, 1200;
    40.7, 38, 27.2, 25.7, 28.9, 29, 37.4, 42.6, 1260;
    40.8, 38.4, 27.5, 26.2, 29.2, 29.2, 37.7, 42.5, 1320;
    41.1, 38.8, 27.8, 26.4, 29.4, 29.5, 37.8, 42.6, 1380;
    41.3, 39.4, 28.1, 26.7, 29.8, 29.9, 38, 42.3, 1440;
    41.3, 39.5, 28.3, 27, 29.9, 30, 38, 42.5, 1500;
    41.4, 39.9, 28.6, 27.2, 30.3, 30.4, 38.3, 42.5, 1560;
    41.7, 40.3, 28.6, 27.6, 30.5, 30.8, 38.3, 42.5, 1620;
    41.7, 40.5, 29, 27.8, 30.8, 30.8, 38.5, 42.5, 1680;
    41.7, 40.8, 29.4, 28.1, 31, 31.1, 38.6, 42.5, 1740;
    41.9, 40.9, 29.5, 28.3, 31.1, 31.2, 38.7, 42.6, 1800
]
# 1. Построим графики функций f(τ) == ln(υ == t_ж  - t). Для этого найдём все нужные значения:
# Для водной среды:
υ_i == t_ж - t_i  # (i=1,2)
# Для воздушной среды:
υ_i == t_в - t_i  # (i=3,4,5,6)
t_1 := t1[:, 1]
t_4 := t1[:, 4]
t_ж := t1[:, 7]
t_2 := t1[:, 2]
t_5 := t1[:, 5]
t_в := t1[:, 8]
t_3 := t1[:, 3]
t_6 := t1[:, 6]
τ := t1[:, 9]
υ_1 := t_ж - t_1
υ_2 := t_ж - t_2
υ_3 := t_в - t_3
υ_4 := t_в - t_4
υ_5 := t_в - t_5
υ_6 := t_в - t_6
υ_1 = [8.1; 5.4; 3.1; 1.6; 0.5; -0.4; -1.1; -1.6; -1.6; -2; -2.3; -2.4; -2.5; -3; -2.8; -3; -2.9; -3.1; -3; -3.2; -3.3; -3.1; -3.3; -3.3; -3.3; -3.1; -3.4; -3.2; -3.1; -3.2]
υ_2 = [8.3; 8.8; 9.5; 9.7; 9.8; 9.5; 8.8; 8; 7.3; 6.3; 5.4; 3.7; 3.7; 2.8; 2.4; 1.7; 1.2; 0.6; 0.5; -0.1; -0.6; -0.7; -1; -1.4; -1.5; -1.6; -2; -2; -2.2; -2.2]
υ_3 = [18; 18; 19.3; 20.3; 20.4; 19.2; 18.8; 19.3; 19.4; 18.7; 18.4; 17.9; 17.6; 17.3; 17.2; 16.7; 16.4; 16; 16.1; 15.3; 15.4; 15; 14.8; 14.2; 14.2; 13.9; 13.9; 13.5; 13.1; 13.1]
υ_4 = [17.4; 18.3; 19.3; 20.9; 21.4; 21.2; 21.1; 20.6; 20.7; 20.3; 19.9; 19.7; 18.8; 18.9; 18.6; 18.3; 17.8; 17.4; 17.4; 16.8; 16.9; 16.3; 16.2; 15.6; 15.5; 15.3; 14.9; 14.7; 14.4; 14.3]
υ_5 = [16.5; 17.3; 18.6; 19.4; 19.5; 19.1; 18.7; 18; 17.8; 17.3; 17; 16.5; 16; 15.7; 15.5; 15.3; 14.9; 14.4; 14.3; 13.7; 13.7; 13.3; 13.2; 12.5; 12.6; 12.2; 12; 11.7; 11.5; 11.5]
υ_6 = [16.1; 17.2; 18.5; 19.4; 19.4; 18.9; 18.6; 17.8; 17.7; 17.2; 16.9; 16.4; 15.9; 15.5; 15.4; 15; 14.8; 14.2; 14.2; 13.6; 13.6; 13.3; 13.1; 12.4; 12.5; 12.1; 11.7; 11.7; 11.4; 11.4]
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lnυ_1 := 3.2809
lnυ_2 := 2.3979
lnυ'_1 := 3.0773
lnυ'_2 := 2.1861
τ_1 := 160  # с
τ_2 := 340  # с
m_1 := (lnυ_1 - lnυ_2)/(τ_2 - τ_1) = 0.00490556
1/с
m_2 := (lnυ'_1 - lnυ'_2)/(τ_2 - τ_1) = 0.00495111
1/с
m'_1 := (m_1 + m_2)/2 = 0.00492833
1/с
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lnυ_3 := 2.5494
lnυ_4 := 2.4932
lnυ'_3 := 2.5177
lnυ'_4 := 2.4248
τ_3 := 160  # с
τ_4 := 340  # с
m_3 := (lnυ_3 - lnυ_4)/(τ_4 - τ_3) = 0.000312222
1/с
m_4 := (lnυ'_3 - lnυ'_4)/(τ_4 - τ_3) = 0.000516111
1/с
m'_2 := (m_3 + m_4)/2 = 0.000414167
1/с
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lnυ_5 := 2.4932
lnυ_6 := 2.4932
lnυ'_5 := 2.4248
lnυ'_6 := 2.4248
τ_5 := 160  # с
τ_6 := 340  # с
m_5 := (lnυ_5 - lnυ_6)/(τ_6 - τ_5) = 0
1/с
m_6 := (lnυ'_5 - lnυ'_6)/(τ_6 - τ_5) = 0
1/с
m'_3 := (m_5 + m_6)/2 = 0
1/с  # m=0, т.к. значения t5=t6
# 2. Для 1 варианта: а) рассчитаем температуру отнесения для коэффициентов
# температуропроводности (а) и теплопроводности (λ), а также удельной
# теплоемкости (Ср)
# а) Расчёт температуры отнесения:
t_3[1] = 20.1  # °C
t_4[1] = 20.7  # °C
t_ж[1] = 29.2  # °C
t_отн1 := (t_ж[1] + t_3[1])/2 = 24.65  # °C
t_отн2 := (t_ж[1] + t_4[1])/2 = 24.95  # °C
t_отн := (t_отн1 + t_отн2)/2 = 24.8  # °C
# б) Для трёх моментов времени построим распределение температуры по сечению калориметра №1.
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Z_1 := 0.060  # - высота калориметра №1
D_1 := 0.040  # - диаметр калориметра №1
Z_2вн := 0.0532  # - высота калориметра №2
D_2вн := 0.0286  # - диаметр калориметра №2
R_1 := D_1/2 = 0.02
R_2вн := D_2вн/2 = 0.0143
# Коэффициент формы калориметров №1  и №2
K_1 := (5.783/R_1^2 + 9.87/Z_1^2)^-1 = 5.81424e-5  # м^2
K_2 := (5.783/R_2вн^2 + 9.87/Z_2вн^2)^-1 = 3.14788e-5  # м^2
x := [-R_1; -0.707*R_1; 0; 0.707*R_1; R_1]
τ_1 := [40.3; 29.3; 13.7; 29.3; 40.3]
τ_2 := [40.3; 30.8; 17.1; 30.8; 40.3]
τ_3 := [40.3; 32.4; 21.1; 32.4; 40.3]
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# Вариант 1.
# 1. Определим коэффициент температуропроводности.
K_1 = 5.81424e-5  # м^2
m'_1 = 0.00492833
1/с
a := K_1*m'_1 = 2.86545e-7  # м^2/с
K_2 = 3.14788e-5  # м^2
m'_2 = 0.000414167
1/с
M := m'_2*K_2/a = 0.0454988
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# По таблице 4 выполним аппроксимацию:
σ := (0.145 - 0.143)/(0.158 - 0.143) = 0.133333
ψ_2 := σ*(0.880 - 0.892) + 0.892 = 0.8904
# 2. Определим коэффициент теплопроводности:
M_об := 0.073  # кг
M_м := 0.23  # кг
с_м := 390  # Дж/(кг*К)
M_3 := M_м
M_2об := M_об
# Без учёта оболочки:
C_2и := (с_м*M_3*m'_3/m'_2 - с_м*M_2об)*ψ_2 = -25.3497  # Дж/К
# С учётом оболочки:
C_2об := с_м*M_3*m'_3/m'_2*ψ_2 = 0  # Дж/К
R_2 := 0.0294/2  # м
Z_2 := 0.054  # м
# Объём с оболочкой:
V_2и := π*R_2вн^2*Z_2вн = 3.4177e-5  # м^3
# Объём без оболочки:
V_2об := π*R_2^2*Z_2 = 3.66588e-5  # м^3
# Без учёта оболочки:
λ_1 := a*C_2и/V_2и = -0.212536  # Вт/(м*К)
# С учётом оболочки:
λ_2 := a*C_2об/V_2об = 0  # Вт/(м*К)
# в) Определим погрешности измерения тепловых свойств материала и сравнить с литературными данными:
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# Все полученные данные значительно меньше табличных.
Δt := 0.05  # с
Δτ := 0.5  # с
δt_1 := Δt/t_1[10] = 0.00136612
δt_2 := Δt/t_2[10] = 0.00176678
δυ_1 := δt_1 = 0.00136612
δυ_2 := δt_2 = 0.00176678
δτ := Δτ/τ[10] = 0.000833333  # м
δlnυ_1 := δυ_1
δlnυ_2 := δυ_2
ΔR_1 := 0.005  # м
ΔZ_1 := 0.005
δm_1 := sqrt(δlnυ_1^2 + δlnυ_2^2 + δτ^2) = 0.00238375
δK_1 := sqrt((ΔR_1/R_1)^2 + (ΔZ_1/Z_1)^2) = 0.263523
δa := sqrt(δm_1^2 + δK_1^2) = 0.263534
Δa := δa*a = 7.55143e-8  # м^2/2
