Rr := 0.707*0.0268/2
D2 := 0.0286
R := □  # error: Пустой местозаполнитель.
R2 := D2/2 = 0.0143
r := Rr/R2 = 0.662503
xl := 0.6 + (0.892 - 0.881)*(0.7 - 0.6)/(0.912 - 0.881) = 0.635484
μ := xl/r = 0.959216
J0(x) = bl  # error: Эта переменная не определена.
a := m[2]*(Rr/μ)^2  # error: Значение должно быть вектором.
