# Определение тепловых свойст материалов методом регулярного режима
# Экспериментальные данные:
Rr := 0.707*0.0268/2
D2 := 0.0286
R2 := D2/2 = 0.0143
r := Rr/R2 = 0.662503
xl := 0.6 + (0.892 - 0.881)*(0.7 - 0.6)/(0.912 - 0.881) = 0.635484
μ := xl/r = 0.959216
t1 := [24.1; 27.5; 27.4; 29.6; 31.4; 33; 34.2; 35.1; 35.8; 36.6; 37.1; 37.9; 38.1; 38.8; 39.1; 39.4; 39.7; 40; 40.2; 40.5; 40.7; 40.9; 41.1; 41.3; 41.3; 41.4; 41.7; 41.7; 41.7; 41.9]
t2 := [20.9; 21; 21.1; 21.5; 22.1; 23.1; 24.3; 25.5; 26.9; 28.3; 29.4; 31.8; 31.9; 33; 33.9; 34.7; 35.6; 36.3; 36.7; 37.4; 38; 38.4; 38.8; 39.4; 39.5; 39.9; 40.3; 40.5; 40.8; 40.9]
t3 := [20.1; 21.3; 21.7; 21.8; 22.2; 23.4; 23.8; 23; 23.1; 23.8; 24.1; 24.6; 24.7; 25; 25.3; 25.8; 26.1; 26.3; 26.4; 27; 27.2; 27.5; 27.8; 28.1; 28.3; 28.6; 28.6; 29; 29.4; 29.5]
t4 := [20.7; 21; 21.7; 21.2; 21.2; 21.4; 21.5; 21.7; 21.8; 22.2; 22.6; 22.8; 23.5; 23.4; 23.9; 24.2; 24.7; 24.9; 25.1; 25.5; 25.7; 26.2; 26.4; 26.7; 27; 27.2; 27.6; 27.8; 28.1; 28.3]
t5 := [21.6; 22; 22.4; 22.7; 23.1; 23.5; 23.9; 24.3; 24.7; 25.2; 25.5; 26; 26.3; 26.6; 27; 27.2; 27.6; 27.9; 28.2; 28.6; 28.9; 29.2; 29.4; 29.8; 29.9; 30.3; 30.5; 30.8; 31; 31.1]
t7 := [29.2; 29.8; 30.6; 31.2; 31.9; 32.6; 33.1; 33.5; 34.2; 34.6; 34.8; 35.5; 35.6; 35.8; 36.3; 36.4; 36.8; 36.9; 37.2; 37.3; 37.4; 37.7; 37.8; 38; 38; 38.3; 38.3; 38.5; 38.6; 38.7]
t8 := [41.3; 42.6; 43.6; 44; 44.2; 44.5; 44.5; 44.2; 44.5; 44.5; 44.5; 44.5; 44.5; 44.3; 44.5; 44.5; 44.3; 44.3; 44.2; 44.3; 44.3; 44.5; 44.3; 44.2; 44.5; 44.5; 44.3; 44.5; 44.3; 44.6]
t6 := [22; 22.1; 22.5; 22.7; 23.2; 23.7; 24; 24.5; 24.8; 25.3; 25.6; 26.1; 26.4; 26.8; 27.1; 27.5; 27.7; 28.1; 28.3; 28.7; 29; 29.2; 29.5; 29.9; 30; 30.4; 30.8; 30.8; 31.1; 31.2]
τ := [60; 120; 180; 240; 300; 360; 420; 480; 540; 600; 660; 720; 780; 840; 900; 960; 1020; 1080; 1140; 1200; 1260; 1320; 1380; 1440; 1500; 1560; 1620; 1680; 1740; 1800]
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σ1 := vectorize(|t7 - t2|) = [8.3; 8.8; 9.5; 9.7; 9.8; 9.5; 8.8; 8; 7.3; 6.3; 5.4; 3.7; 3.7; 2.8; 2.4; 1.7; 1.2; 0.6; 0.5; 0.1; 0.6; 0.7; 1; 1.4; 1.5; 1.6; 2; 2; 2.2; 2.2]
σ2 := vectorize(|t7 - t2|) = [8.3; 8.8; 9.5; 9.7; 9.8; 9.5; 8.8; 8; 7.3; 6.3; 5.4; 3.7; 3.7; 2.8; 2.4; 1.7; 1.2; 0.6; 0.5; 0.1; 0.6; 0.7; 1; 1.4; 1.5; 1.6; 2; 2; 2.2; 2.2]
σ3 := vectorize(|t7 - t3|) = [9.1; 8.5; 8.9; 9.4; 9.7; 9.2; 9.3; 10.5; 11.1; 10.8; 10.7; 10.9; 10.9; 10.8; 11; 10.6; 10.7; 10.6; 10.8; 10.3; 10.2; 10.2; 10; 9.9; 9.7; 9.7; 9.7; 9.5; 9.2; 9.2]
σ4 := vectorize(|t7 - t4|) = [8.5; 8.8; 8.9; 10; 10.7; 11.2; 11.6; 11.8; 12.4; 12.4; 12.2; 12.7; 12.1; 12.4; 12.4; 12.2; 12.1; 12; 12.1; 11.8; 11.7; 11.5; 11.4; 11.3; 11; 11.1; 10.7; 10.7; 10.5; 10.4]
σ5 := vectorize(|t7 - t5|) = [7.6; 7.8; 8.2; 8.5; 8.8; 9.1; 9.2; 9.2; 9.5; 9.4; 9.3; 9.5; 9.3; 9.2; 9.3; 9.2; 9.2; 9; 9; 8.7; 8.5; 8.5; 8.4; 8.2; 8.1; 8; 7.8; 7.7; 7.6; 7.6]
σ6 := vectorize(|t7 - t6|) = [7.2; 7.7; 8.1; 8.5; 8.7; 8.9; 9.1; 9; 9.4; 9.3; 9.2; 9.4; 9.2; 9; 9.2; 8.9; 9.1; 8.8; 8.9; 8.6; 8.4; 8.5; 8.3; 8.1; 8; 7.9; 7.5; 7.7; 7.5; 7.5]
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# Линейные участки:
τ1 := τ[15] = 960
τ3 := τ[15] = 960
ln(σ1[15]) = 0.530628
ln(σ3[16]) = 2.37024
τ2 := τ[16] = 1020
τ4 := τ[16] = 1020
ln(σ2[16]) = 0.182322
ln(σ4[16]) = 2.49321
m1 := (ln(σ1[15]) - ln(σ2[16]))/(τ2 - τ1) = 0.00580511
τ5 := τ[15] = 960
ln(σ5[15]) = 2.2192
m2 := 0 - (ln(σ3[15]) - ln(σ4[16]))/(τ4 - τ3) = 0.00220586
τ6 := τ[16] = 1020
m3 := (ln(σ5[15]) - ln(σ6[16]))/(τ6 - τ5) = 0.000182151
ln(σ6[16]) = 2.20827
K1 := (5.783/(0.040/2)^2 + 9.87/(0.060/1)^2)^-1 = 5.81424e-5
K2 := (5.783/(0.0286/2)^2 + 9.87/(0.0532/1)^2)^-1 = 3.14788e-5
a1 := K1*m1 = 3.37523e-7
R[1] := 0.02
Fo := a1*τ[2]/R[1]^2 = 0.151885
M := m2*K2/a1 = 0.205727
ψ := 1
cpbez := L*N2/ρ  # error: Эта переменная не определена.
ρ := 1.2*10^3
N2 := a2*ψ2/m2  # error: Эта переменная не определена.
L := F2/V2  # error: Эта переменная не определена.
