Ut, mV
Un, mV
dE, mV
# [component: outputs Ut_Un_dE]
Ut := Ut_Un_dE[:, 0]*0.001
Un := Ut_Un_dE[:, 1]*0.001
dE := Ut_Un_dE[:, 2]
Rn := 0.1
D2 := 0.0025
D1 := 0.000189
L := 0.0815
t_room := 20
t := "test"
ε(T) := 0.00013*T - 0.0025
Rt0 := 0.28736
k_ChrAl := 24.45
Res :=
    (Rt ← vectorize(Ut)/Un*Rn)*(dRt ← Rt/Rt0 - 1)
    (T1 ← 273.15 + 252*vectorize(dRt*2/(1 + sqrt(1 - 0.1485*dRt))))*(T2 ← t_room + k_ChrAl*dE + 273.15)
    (qL ← vectorize(Un*Ut)/(Rn*L))*(qLrad ← vectorize(ε(T1)*5.67*10^-8*π*D1*(vectorize(T1^4) - vectorize(T2^4))))
    qLλ ← qL - qLrad
    transpose([T1, T2, qLλ, max(vectorize(qLrad)/qL)])
T1 := Res[0]
T2 := Res[1]
qLλ_exper := Res[2]
Radiation_Contribution := Res[3]
T1 = [300.038; 305.437; 314.934; 327.684; 350.617; 370.569; 401.138; 437.982; 489.604; 538.204]
Fq(x) := [1; x; x^2]
Sq := linfit(T1, qLλ_exper, Fq)
Sq = [-11.2278; 0.00920153; 9.55606e-5]
qLλ_fit(T) := Fq(T)*Sq
T1 = [300.038; 305.437; 314.934; 327.684; 350.617; 370.569; 401.138; 437.982; 489.604; 538.204]
qLλ_fitting := vectorize(qLλ_fit(T1))
qLλ_fitting = [0.135674; 0.497703; 1.14813; 2.0484; 3.74593; 5.30451; 7.84014; 11.1335; 16.1844; 21.4049]
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qLλ_fit(T) == a + bT + cT^2
a := Sq[0]
a = -11.2278
b := Sq[1]
b = 0.00920153
c := Sq[2]
c = 9.55606e-5
Fq(T)[0] → 1
Fq(T)[1] → T
Fq(T)[2] → T^2
Sq[0] = -11.2278
Sq[1] = 0.00920153
Sq[2] = 9.55606e-5
qLλ_fit(T) := Sq[0]*Fq(T)[0] + Sq[1]*Fq(T)[1] + Sq[2]*Fq(T)[2]
A := 1/(2*π)*ln(D2/D1)
A = 0.410986
B := b
B = 0.00920153
C := 2*c
C = 0.000191121
λ(T) := A*(B + C*T)
# [component: outputs T_λ]
T_tabl := T_λ[:, 0]
λ_tabl := T_λ[:, 1]
λ_exper := vectorize(λ(T_tabl))
T_λ_λ_exper := augment(T_λ, λ_exper)
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T_λ_λ_exper = [
    300.038, 0.0244, 0.0273491;
    350.61, 0.0321, 0.0313214;
    437.98, 0.0393, 0.0381842;
    538.29, 0.0461, 0.0460633
]
(vectorize(λ_exper - λ_tabl)/λ_exper) = [0.107832; -0.0248571; -0.0292219; -0.000795809]
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corr(qLλ_fitting, qLλ_exper) = 0.999878
stderr(qLλ_fitting, qLλ_exper) = 0.120014
σ_B := 5.982552*10^-4
σ_C := 2*(7.20852*10^-7)
σ_λ := A*sqrt(σ_B^2 + T1^2*σ_C^2)
σ_λ = [0.000303413; 0.000305298; 0.000308667; 0.000313292; 0.00032189; 0.000329644; 0.000341975; 0.000357493; 0.000380279; 0.000402677]
vectorize(σ_λ/λ(T1)) = [0.0110941; 0.0109926; 0.0108231; 0.0106126; 0.0102768; 0.0100229; 0.00969033; 0.00936229; 0.009003; 0.0087431]
λ_m := 1/(2*π)*ln(D2/D1)*vectorize(qLλ_exper)/(T1 - T2)
T_m := (T1 + T2)/2
new_λm := submatrix(λ_m, 3, rows(λ_m) - 1, 0, 0) = [0.025086; 0.0258368; 0.0284503; 0.0300384; 0.0320704; 0.0334076; 0.0360823]
T_λ = [300.038, 0.0244; 350.61, 0.0321; 437.98, 0.0393; 538.29, 0.0461]
T_tabl := T_λ[:, 0]
λ_tabl := T_λ[:, 1]
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λ_m = [0.00850796; 0.0178347; 0.0225773; 0.025086; 0.0258368; 0.0284503; 0.0300384; 0.0320704; 0.0334076; 0.0360823]
T_m = [296.875; 299.575; 304.323; 310.662; 322.067; 331.994; 347.205; 365.578; 391.451; 415.824]
# Обработка данных по методу нагретой нити с учетом постоянства температуры холодной стенки
new_λm = [0.025086; 0.0258368; 0.0284503; 0.0300384; 0.0320704; 0.0334076; 0.0360823]
new_Tm := submatrix(T_m, 3, rows(T_m) - 1, 0, 0) = [310.662; 322.067; 331.994; 347.205; 365.578; 391.451; 415.824]
approx_λm := (new_λm[0] + new_λm[1] + new_λm[2] + new_λm[3] + new_λm[4] + new_λm[5] + new_λm[6])/7 = 0.0301388
a := approx_λm = 0.0301388
λ(T1) := 1/(2*π)*ln(D2/D1)*(b + 2*c*T1)
λ(t) == a + b*t
b := 1
λ(t) := a + b*t
b := slope(new_Tm, new_λm - 0.03014) = 0.000103231
λ(T1) = [300.069; 305.467; 314.965; 327.714; 350.648; 370.599; 401.169; 438.012; 489.635; 538.234]
# Вывод  теплопроводность воздуха увеличивается с ростом температуры
# полученные значения λ совпадают со справочными значениями. Систематические ощибки, связанные с излучением и конвекцией, были минимизированы и учтены при обработке данных.
